OpenVSP model (file version 5), 6 components.
Geometry view with OpenVSP parameter names; values to 6 digits, angles in degrees, lengths in the model's unit.
Overall bounding box: X_Min=0 X_Len=72.9504 Y_Min=-39.7185 Y_Len=79.4369 Z_Min=-2.52156 Z_Len=22.086

Fuselage "FuselageA380"
  location (X Y Z) 0 0 0, rotation 0 0 0
  bounding box size 72.9504 8.08843 8.54446
  Design: Length=72.72
  cross sections:
    n  XLocPercent  XRotate   YLocPercent  YRotate  ZLocPercent  shape
    0  0            0         0            0        0            point
    1  0.0299243    0         0            0        0.00259899   ellipse Ellipse_Height=3.88238 Ellipse_Width=4.40089
    2  0.221259     0         0            0        0.0244227    ellipse Ellipse_Height=8.3 Ellipse_Width=8
    3  0.631139     0         0            0        0.0244558    as above
    4  0.730352     0         0            0        0.0284209    ellipse Ellipse_Height=7.91226 Ellipse_Width=7.77997
    5  1            0.642857  0            3.21429  0.045        ellipse Ellipse_Height=1.18356 Ellipse_Width=1.15308
    6  1            0.642857  0            3.21429  0.045        point

Wing "AilesA380", child of "FuselageA380"
  location (X Y Z) 17.2091 0 -0.897959, rotation 0 0 0
  symmetric about XZ
  bounding box size 33.6609 79.4369 4.70484
  totals: TotalSpan=79.8 TotalProjectedSpan=79.4369 TotalChord=11.0968 TotalArea=885.524 TotalAR=7.12598 MAC=13.412
  root: chord 20.5465, twist 0, NACA 4-series Camber=0 CamberLoc=0.2 ThickChord=0.1
  sections:
    n  Span   Root_Chord  Tip_Chord  Area     Sweep    Sweep_Location  Dihedral  Twist  Twist_Location  tip airfoil
    1  19.95  20.5465     10.3984    308.675  37.7143  0               7.11744   0      0.25            as above
    2  19.95  10.3984     3.04388    134.087  37.2857  0               3.02491   0      0.25            as above

Wing "VTP HTP"
  location (X Y Z) 58.4426 0 2.65306, rotation 0 0 0
  symmetric about XZ
  bounding box size 14.2612 29.9468 2.34476
  totals: TotalSpan=30.1587 TotalProjectedSpan=29.9468 TotalChord=5.59722 TotalArea=168.805 TotalAR=5.31268 MAC=6.08
  root: chord 8.44444, twist 0, NACA 4-series Camber=0 CamberLoc=0.2 ThickChord=0.1
  sections:
    n  Span     Root_Chord  Tip_Chord  Area     Sweep    Sweep_Location  Dihedral  Twist  Twist_Location  tip airfoil
    1  15.0794  8.44444     2.75       84.4026  37.3571  0               6.79715   0      0.25            as above

Wing "Fin tail", child of "VTP HTP"
  location (X Y Z) 56.2857 0 5.83673, rotation 90 0 -7.30612
  bounding box size 16.2557 1.07968 15.0999
  totals: TotalSpan=15.2831 TotalProjectedSpan=15.2831 TotalChord=6.98221 TotalArea=106.71 TotalAR=2.18886 MAC=7.6746
  root: chord 10.7905, twist 0, NACA 4-series Camber=0 CamberLoc=0.2 ThickChord=0.1
  sections:
    n  Span     Root_Chord  Tip_Chord  Area    Sweep    Sweep_Location  Dihedral  Twist  Twist_Location  tip airfoil
    1  15.2831  10.7905     3.17391    106.71  36.3701  0               0         0      0.25            as above

Duct "Moteurs internes"
  location (X Y Z) 30.2174 -15.8696 -0.543478, rotation 0 0 0
  symmetric about XZ
  bounding box size 8.05027 35.2724 3.41941
  Design: Camber=0.113636 CamberLoc=0.218182 Chord=8.05027 Height=1.80084 InvertFlag=0 Shape=-0.0545455 ThickChord=0.195455 Width=1.95082
  custom script Duct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

Custom "Moteurs externes", child of "Moteurs internes"
  location (X Y Z) 39.4565 -27.8696 0.326087, rotation 0 0 0
  symmetric about XZ
  bounding box size 8.05027 59.2724 3.41941
  Design: Camber=0.113636 CamberLoc=0.218182 Chord=8.05027 Height=1.80084 InvertFlag=0 Shape=-0.0545455 ThickChord=0.195455 Width=1.95082
  custom script Duct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
