OpenVSP model (file version 5), 6 components.
Geometry view with OpenVSP parameter names; values to 6 digits, angles in degrees, lengths in the model's unit.
Overall bounding box: X_Min=0 X_Len=66 Y_Min=-14.3211 Y_Len=28.6422 Z_Min=-1.81754 Z_Len=6.64771

Fuselage "NE 66"
  location (X Y Z) 0 0 0, rotation 0 0 0
  bounding box size 66 2.34716 3.68047
  Design: Length=66
  cross sections:
    n  XLocPercent  YLocPercent  ZLocPercent  shape
    0  0            0            -0.00563525  point
    1  0.0886527    0            -0.00204918  circle Circle_Diameter=1.21333
    2  0.170771     0            0.000343852  super ellipse Super_Height=2.2608 Super_M=1.42483 Super_M_bot=0.857373 Super_MaxWidthLoc=-0.142857 Super_N=1.73861 Super_N_bot=3.91562 Super_TopBotSym=0 Super_Width=2.08912
    3  0.238533     0            0            super ellipse Super_Height=2.21983 Super_M=1.38 Super_M_bot=3.19214 Super_MaxWidthLoc=-0.1 Super_N=2 Super_N_bot=2 Super_TopBotSym=0 Super_Width=2.34715
    4  0.811952     0            0            super ellipse Super_Height=1.90571 Super_M=1.38 Super_M_bot=3.19214 Super_MaxWidthLoc=-0.1 Super_N=2 Super_N_bot=2 Super_TopBotSym=0 Super_Width=2.03653
    5  1            0            0.0111787    point

Human "HumanGeom"
  location (X Y Z) 20 0 0, rotation 0 0 0
  mass: Density=2320.52 Shell_Flag=0 Mass_Area=1 Mass_Prior=0
  Anthropometric: Age=30 AutoDensity=1 BMI=27.7 BMI_pct=0.5 GenderFlag=0 LenUnit=2 Mass=196.172 MassUnit=3 SitFrac=0.51 Stature=1.7923 Stature_pct=0.684814 Volume=0.084538

Wing "WingGeom"
  location (X Y Z) 18.3197 0.737705 -0.491803, rotation 0 0 0
  symmetric about XZ
  bounding box size 38.5075 28.6422 3.71479
  totals: TotalSpan=27.7731 TotalProjectedSpan=27.1668 TotalChord=11.1921 TotalArea=314.637 TotalAR=2.34568
  root: chord 31.9782, twist 0, NACA 16-series IdealCl=0.075 ThickChord=0.0178571
  sections:
    n  Span     Root_Chord  Tip_Chord  Area     Sweep    Sweep_Location  Dihedral  Twist     Twist_Location  tip airfoil
    1  2.31558  31.9782     18.4918    58.4338  81.3094  0               0         0         0.25            NACA 16-series IdealCl=0.0571429 ThickChord=0.0142857
    2  6.27265  18.4918     6.36375    77.9549  65.1989  0               2.85714   0.214286  0.460714        NACA 16-series IdealCl=0.153571 ThickChord=0.0321429
    3  3.37768  6.36375     3.63173    16.8808  61.2312  0               2.60714   0         0.25            NACA 16-series IdealCl=0.392857 ThickChord=0.0535714
    4  1.92064  3.63173     0.584388   4.04881  54.0179  0               32        0         0.25            NACA 16-series IdealCl=0.2 ThickChord=0.1

Wing "NE 4"
  location (X Y Z) 51.2141 0 0.819672, rotation 90 -0.0819672 0.0819672
  bounding box size 9.09147 0.357477 4.0105
  totals: TotalSpan=4 TotalProjectedSpan=4 TotalChord=5.83192 TotalArea=23.3277 TotalAR=0.685881
  root: chord 9.09149, twist 0, NACA 4-series Camber=0 CamberLoc=0.2 ThickChord=0.0392857
  sections:
    n  Span  Root_Chord  Tip_Chord  Area     Sweep  Sweep_Location  Dihedral  Twist  Twist_Location  tip airfoil
    1  4     9.09149     2.57235    23.3277  50     0               0         0      0.25            NACA 4-series Camber=0 CamberLoc=0.2 ThickChord=0.1

Fuselage "AEM 111"
  location (X Y Z) 47.5986 -8.55533 -0.491803, rotation 0 0 0
  symmetric about XZ
  bounding box size 6.96059 18.0165 0.905812
  Design: Length=6.96059
  cross sections:
    n  XLocPercent  XRotate  YLocPercent  ZLocPercent  shape
    0  0            0        0            0            circle Circle_Diameter=0.659721
    1  0.401639     3.85714  0            0            circle Circle_Diameter=0.891285
    2  1            3.85714  0            0            circle Circle_Diameter=0.607117

Fuselage "AEM 112", child of "AEM 111"
  location (X Y Z) 44.7976 -6.06557 -0.860656, rotation 0 0 0
  symmetric about XZ
  bounding box size 11.4476 13.037 0.905812
  Design: Length=11.4476
  cross sections:
    n  XLocPercent  XRotate  YLocPercent  ZLocPercent  shape
    0  0            0        0            0            circle Circle_Diameter=0.659721
    1  0.401639     3.85714  0            0            circle Circle_Diameter=0.891285
    2  1            3.85714  0            0            circle Circle_Diameter=0.607117
