OpenVSP model (file version 5), 23 components.
Geometry view with OpenVSP parameter names; values to 6 digits, angles in degrees, lengths in the model's unit.
Overall bounding box: X_Min=-0.644292 X_Len=17.6368 Y_Min=-5.59165 Y_Len=11.1704 Z_Min=-0.95 Z_Len=5.23504

Fuselage "Mainbody"
  location (X Y Z) 0 0 0, rotation 0 0 0
  bounding box size 15.0771 1.95 1.48782
  Design: Length=15.06
  cross sections:
    n  XLocPercent  YLocPercent  ZLocPercent  shape
    0  0            0            0.03         point
    1  0.303414     0            0.04         ellipse Ellipse_Height=1.38201 Ellipse_Width=1.21036
    2  0.401707     0            0.04         ellipse Ellipse_Height=1.38201 Ellipse_Width=1.37582
    3  0.616505     0            0.0326087    ellipse Ellipse_Height=1.18182 Ellipse_Width=1.95
    4  1            0            0.0326087    ellipse Ellipse_Height=1.0219 Ellipse_Width=1.00123
    5  1            0            0.0323724    ellipse Ellipse_Height=0.919711 Ellipse_Width=0.91971
    6  1            0            0.03237      point

Wing "Wing stake (front)", child of "Mainbody"
  location (X Y Z) 0.6 0 0.29, rotation 0 0 0
  symmetric about XZ
  bounding box size 7.00469 2.96875 0.00545021
  totals: TotalSpan=2.96875 TotalProjectedSpan=2.96875 TotalChord=2.87611 TotalArea=8.53846 TotalAR=1.03221
  root: chord 5.69775, twist 0, wedge ThickChord=0 ThickLoc=0.5
  sections:
    n  Span     Root_Chord  Tip_Chord  Area     Sweep    Sweep_Location  Dihedral  Twist  Twist_Location  tip airfoil
    1  1.48438  5.69775     0.0544705  4.26923  77.9443  0               0         0      0.25            NACA 4-series Camber=0 CamberLoc=0.2 ThickChord=0.1

Wing "Main wing", child of "Wing stake (front)"
  location (X Y Z) 6.30435 0 0.29, rotation 0 0 0
  symmetric about XZ
  bounding box size 5.61458 10.0938 0.121134
  totals: TotalSpan=10.0938 TotalProjectedSpan=10.0938 TotalChord=3.40885 TotalArea=34.4081 TotalAR=2.96104
  root: chord 5.61458, twist 0, wedge ThickChord=0.0215732 ThickLoc=0.5
  sections:
    n  Span     Root_Chord  Tip_Chord  Area     Sweep    Sweep_Location  Dihedral  Twist  Twist_Location  tip airfoil
    1  5.04688  5.61458     1.20312    17.2041  41.0455  0               0         0      0.25            NACA 4-series Camber=0 CamberLoc=0.2 ThickChord=0.1
  SS_Control "SS_CONT_0": UStart=0.402439 UEnd=0.676829 Length_C_Start=0.243902 Length_C_End=0.243902 Length_Start=1.14634 Length_End=0.293445 LE_Flag=0 Surf_Type=2

Fuselage "AIM-120", child of "Main wing"
  location (X Y Z) 6.84783 -2.17391 -0.0869565, rotation 0 0 0
  bounding box size 5.37927 0.2 0.245833
  Design: Length=5.34594
  cross sections:
    n  XLocPercent  YLocPercent  ZLocPercent  shape
    0  0            0            0            point
    1  0.25         0            0            ellipse Ellipse_Height=0.2 Ellipse_Width=0.2
    2  0.5          0            0            as above
    3  1            0            0            as above
    4  1            0            0            point

Wing "Missile Stablizer front", child of "AIM-120"
  location (X Y Z) 11.8665 -2.17391 -0.108696, rotation -135 0 0; relative location 11.8665 -2.17391 -0.108696, rotation 45 180 180
  symmetric about XZ
  bounding box size 0.320174 0.502995 0.262768
  totals: TotalSpan=0.703373 TotalProjectedSpan=0.703373 TotalChord=0.199116 TotalArea=0.140053 TotalAR=3.53248
  root: chord 0.318585, twist 0, NACA 4-series Camber=0 CamberLoc=0.2 ThickChord=0.1
  sections:
    n  Span      Root_Chord  Tip_Chord  Area       Sweep    Sweep_Location  Dihedral  Twist  Twist_Location  tip airfoil
    1  0.351686  0.318585    0.0796463  0.0700263  34.3693  0               0         0      0.25            as above

Wing "Missile Stablizer front", child of "AIM-120"
  location (X Y Z) 11.8665 -2.17391 -0.108696, rotation 45 0 0
  symmetric about XZ
  bounding box size 0.319988 0.502702 0.262615
  totals: TotalSpan=0.702964 TotalProjectedSpan=0.702964 TotalChord=0.199 TotalArea=0.13989 TotalAR=3.53248
  root: chord 0.3184, twist 0, NACA 4-series Camber=0 CamberLoc=0.2 ThickChord=0.1
  sections:
    n  Span      Root_Chord  Tip_Chord  Area       Sweep    Sweep_Location  Dihedral  Twist  Twist_Location  tip airfoil
    1  0.351482  0.3184      0.0796     0.0699449  34.3693  0               0         0      0.25            as above

Wing "Missile Stablizer front", child of "AIM-120"
  location (X Y Z) 9.45652 -2.17391 -0.108696, rotation -135 0 0; relative location 9.45652 -2.17391 -0.108696, rotation 45 180 180
  symmetric about XZ
  bounding box size 0.252153 0.396133 0.206942
  totals: TotalSpan=0.55394 TotalProjectedSpan=0.55394 TotalChord=0.156813 TotalArea=0.0868651 TotalAR=3.53248
  root: chord 0.250901, twist 0, NACA 4-series Camber=0 CamberLoc=0.2 ThickChord=0.1
  sections:
    n  Span     Root_Chord  Tip_Chord  Area       Sweep    Sweep_Location  Dihedral  Twist  Twist_Location  tip airfoil
    1  0.27697  0.250901    0.0627253  0.0434326  34.3693  0               0         0      0.25            as above

Wing "Missile Stablizer front", child of "AIM-120"
  location (X Y Z) 9.45652 -2.17391 -0.108696, rotation 45 0 0
  symmetric about XZ
  bounding box size 0.252153 0.396133 0.206942
  totals: TotalSpan=0.55394 TotalProjectedSpan=0.55394 TotalChord=0.156813 TotalArea=0.0868651 TotalAR=3.53248
  root: chord 0.250901, twist 0, NACA 4-series Camber=0 CamberLoc=0.2 ThickChord=0.1
  sections:
    n  Span     Root_Chord  Tip_Chord  Area       Sweep    Sweep_Location  Dihedral  Twist  Twist_Location  tip airfoil
    1  0.27697  0.250901    0.0627253  0.0434326  34.3693  0               0         0      0.25            as above

Wing "Hardpoints", child of "Main wing"
  location (X Y Z) 8.15217 1.41313 -0.02, rotation 90 0 0
  symmetric about XZ
  bounding box size 1.1714 2.92632 0.296876
  totals: TotalSpan=0.593752 TotalProjectedSpan=0.593752 TotalChord=1.01042 TotalArea=0.599937 TotalAR=0.587631
  root: chord 1.02083, twist 0, wedge ThickChord=0.0454545 ThickLoc=0.5
  sections:
    n  Span      Root_Chord  Tip_Chord  Area      Sweep  Sweep_Location  Dihedral  Twist  Twist_Location  tip airfoil
    1  0.296876  1.02083     1          0.299968  30     0               0         0      0.25            NACA 4-series Camber=0 CamberLoc=0.2 ThickChord=0.1

Fuselage "External Tank", child of "Main wing"
  location (X Y Z) 6.52174 1.41304 -0.15, rotation 0 0 0
  symmetric about XZ
  bounding box size 4.12679 3.52609 0.7
  Design: Length=4.12679
  cross sections:
    n  XLocPercent  YLocPercent  ZLocPercent  shape
    0  0            0            0            point
    1  0.25         0            0            ellipse Ellipse_Height=0.7 Ellipse_Width=0.7
    2  0.5          0            0            as above
    3  0.75         0            0            as above
    4  1            0            0            point

Wing "Hardpoints", child of "Main wing"
  location (X Y Z) 10.1087 2.174 -0.02, rotation 90 0 0
  symmetric about XZ
  bounding box size 1.1714 4.44806 0.296876
  totals: TotalSpan=0.593752 TotalProjectedSpan=0.593752 TotalChord=1.01042 TotalArea=0.599937 TotalAR=0.587631
  root: chord 1.02083, twist 0, wedge ThickChord=0.0454545 ThickLoc=0.5
  sections:
    n  Span      Root_Chord  Tip_Chord  Area      Sweep  Sweep_Location  Dihedral  Twist  Twist_Location  tip airfoil
    1  0.296876  1.02083     1          0.299968  30     0               0         0      0.25            NACA 4-series Camber=0 CamberLoc=0.2 ThickChord=0.1

Wing "Tail Elevon", child of "Mainbody"
  location (X Y Z) 12.3913 0.5 0.29, rotation 0 0 0
  symmetric about XZ
  bounding box size 3.56657 6.06755 0.129757
  totals: TotalSpan=5.06755 TotalProjectedSpan=5.06755 TotalChord=2.43169 TotalArea=12.3227 TotalAR=2.08396
  root: chord 3.56657, twist 0, wedge ThickChord=0.00906072 ThickLoc=0.679277
  sections:
    n  Span     Root_Chord  Tip_Chord  Area     Sweep    Sweep_Location  Dihedral  Twist  Twist_Location  tip airfoil
    1  2.53377  3.56657     1.29682    6.16136  41.4875  0               0         0      0.25            NACA 4-series Camber=0 CamberLoc=0.2 ThickChord=0.1
  SS_Control "SS_CONT_0": UStart=0.371951 UEnd=0.689024 Length_C_Start=1 Length_C_End=1 Length_Start=3.30361 Length_End=1.29682 LE_Flag=1 Surf_Type=2

Wing "Vetical Stablizer", child of "Mainbody"
  location (X Y Z) 9.78261 0 0.85, rotation 90 0 0
  bounding box size 7.20987 0.120382 3.13672
  totals: TotalSpan=3.13672 TotalProjectedSpan=3.13672 TotalChord=3.19968 TotalArea=8.46748 TotalAR=1.16198
  root: chord 5.83333, twist 0, wedge ThickChord=0.0136364 ThickLoc=0.5
  sections:
    n  Span      Root_Chord  Tip_Chord  Area     Sweep    Sweep_Location  Dihedral  Twist  Twist_Location  tip airfoil
    1  0.890626  5.83333     2.88113    3.88066  75.1602  0               0         0      0.25            wedge ThickChord=0.0363636 ThickLoc=0.5
    2  2.24609   2.88113     1.20312    4.58681  49.6659  0               0         0      0.25            NACA 4-series Camber=0 CamberLoc=0.2 ThickChord=0.1
  SS_Control "SS_CONT_0": UStart=0.304878 UEnd=0.743902 Length_C_Start=0.237805 Length_C_End=0.237805 Length_Start=1.23309 Length_End=0.295842 LE_Flag=0 Surf_Type=2

Custom "Engine", child of "Mainbody"
  location (X Y Z) 15.4 0 0.49, rotation 0 0 0
  bounding box size 1.41362 1.00623 1.04018
  Design: Camber=0 CamberLoc=0.2 Chord=1.41362 Height=0.82 InvertFlag=0 Shape=0 ThickChord=0.145833 Width=0.8
  custom script Duct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

Pod "Pod", child of "Mainbody"
  location (X Y Z) 6.42857 0 1, rotation -180 0 -180; relative location 6.42857 0 1, rotation 0 180 0
  bounding box size 3.16667 1.03401 1.03401
  Design: FineRatio=6.125 Length=3.16667

Fuselage "AIM-120", child of "Mainbody"
  location (X Y Z) 6.84783 2.17391 -0.087, rotation 0 0 0
  bounding box size 5.37927 0.2 0.245833
  Design: Length=5.34594
  cross sections:
    n  XLocPercent  YLocPercent  ZLocPercent  shape
    0  0            0            0            point
    1  0.25         0            0            ellipse Ellipse_Height=0.2 Ellipse_Width=0.2
    2  0.5          0            0            as above
    3  1            0            0            as above
    4  1            0            0            point

Wing "Missile Stablizer front", child of "AIM-120"
  location (X Y Z) 11.8665 2.1887 -0.108696, rotation -135 0 0; relative location 11.8665 2.1887 -0.108696, rotation 45 180 180
  symmetric about XZ
  bounding box size 0.320174 0.47343 0.262768
  totals: TotalSpan=0.703373 TotalProjectedSpan=0.703373 TotalChord=0.199116 TotalArea=0.140053 TotalAR=3.53248
  root: chord 0.318585, twist 0, NACA 4-series Camber=0 CamberLoc=0.2 ThickChord=0.1
  sections:
    n  Span      Root_Chord  Tip_Chord  Area       Sweep    Sweep_Location  Dihedral  Twist  Twist_Location  tip airfoil
    1  0.351686  0.318585    0.0796463  0.0700263  34.3693  0               0         0      0.25            as above

Wing "Missile Stablizer front", child of "AIM-120"
  location (X Y Z) 11.8665 2.17391 -0.108696, rotation 45 0 0
  symmetric about XZ
  bounding box size 0.319988 0.502702 0.262615
  totals: TotalSpan=0.702964 TotalProjectedSpan=0.702964 TotalChord=0.199 TotalArea=0.13989 TotalAR=3.53248
  root: chord 0.3184, twist 0, NACA 4-series Camber=0 CamberLoc=0.2 ThickChord=0.1
  sections:
    n  Span      Root_Chord  Tip_Chord  Area       Sweep    Sweep_Location  Dihedral  Twist  Twist_Location  tip airfoil
    1  0.351482  0.3184      0.0796     0.0699449  34.3693  0               0         0      0.25            as above

Wing "Missile Stablizer front", child of "AIM-120"
  location (X Y Z) 9.45652 2.17391 -0.108696, rotation -135 0 0; relative location 9.45652 2.17391 -0.108696, rotation 45 180 180
  symmetric about XZ
  bounding box size 0.252153 0.396133 0.206942
  totals: TotalSpan=0.55394 TotalProjectedSpan=0.55394 TotalChord=0.156813 TotalArea=0.0868651 TotalAR=3.53248
  root: chord 0.250901, twist 0, NACA 4-series Camber=0 CamberLoc=0.2 ThickChord=0.1
  sections:
    n  Span     Root_Chord  Tip_Chord  Area       Sweep    Sweep_Location  Dihedral  Twist  Twist_Location  tip airfoil
    1  0.27697  0.250901    0.0627253  0.0434326  34.3693  0               0         0      0.25            as above

Wing "Missile Stablizer front", child of "AIM-120"
  location (X Y Z) 9.45652 2.17391 -0.108696, rotation 45 0 0
  symmetric about XZ
  bounding box size 0.252153 0.396133 0.206942
  totals: TotalSpan=0.55394 TotalProjectedSpan=0.55394 TotalChord=0.156813 TotalArea=0.0868651 TotalAR=3.53248
  root: chord 0.250901, twist 0, NACA 4-series Camber=0 CamberLoc=0.2 ThickChord=0.1
  sections:
    n  Span     Root_Chord  Tip_Chord  Area       Sweep    Sweep_Location  Dihedral  Twist  Twist_Location  tip airfoil
    1  0.27697  0.250901    0.0627253  0.0434326  34.3693  0               0         0      0.25            as above

Wing "Back-front wing connector", child of "Mainbody"
  location (X Y Z) 11.9 -1.19565 0.29, rotation 0 0 0
  symmetric about XZ
  bounding box size 1.11707 2.3913 0.0386
  totals: TotalSpan=2.50334 TotalProjectedSpan=2.50334 TotalChord=0.558533 TotalArea=1.3982 TotalAR=4.48199
  root: chord 1.11707, twist 0, wedge ThickChord=0.0345534 ThickLoc=0.5
  sections:
    n  Span     Root_Chord  Tip_Chord  Area      Sweep     Sweep_Location  Dihedral  Twist  Twist_Location  tip airfoil
    1  1.25167  1.11707     0          0.699099  0.278977  0               0         0      0.25            NACA 4-series Camber=0 CamberLoc=0.2 ThickChord=0.1

Custom "Air-intake"
  location (X Y Z) 9.01429 0 0.07, rotation 0 -4.8 0
  bounding box size 6.72314 1.53011 1.22516
  Design: Camber=0 CamberLoc=0.2 Chord=6.69206 Height=0.642608 InvertFlag=0 Shape=0.15 ThickChord=0.0208333 Width=1.38849
  custom script Duct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

Mesh "MeshGeom"
  location (X Y Z) 16.6 5.6 -0.95, rotation 90 -90 0
  triangle mesh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
