OpenVSP model (file version 4), 8 components.
Geometry view with OpenVSP parameter names; values to 6 digits, angles in degrees, lengths in the model's unit.
Overall bounding box: X_Min=0 X_Len=15.7321 Y_Min=-5.5356 Y_Len=11.0712 Z_Min=-0.822432 Z_Len=3.50671

Blank "Su-27"
  location (X Y Z) 0 0 0, rotation 0 0 0

Wing "Main Wing", child of "Su-27"
  location (X Y Z) 6.40548 0 0.07908, rotation 0 0 0
  symmetric about XZ
  bounding box size 6.64272 11.0712 0.243468
  totals: TotalSpan=11.0712 TotalProjectedSpan=11.0712 TotalChord=4.1517 TotalArea=45.9643 TotalAR=2.66667
  root: chord 6.64272, twist 0, NACA 6-series (series code 6) A=0 IdealCl=0 ThickChord=0.0366477
  sections:
    n  Span    Root_Chord  Tip_Chord  Area     Sweep  Sweep_Location  Dihedral  Twist  Twist_Location  tip airfoil
    1  5.5356  6.64272     1.66068    22.9822  33     0               0         0      0.25            NACA 6-series (series code 6) A=0 IdealCl=0 ThickChord=0.0306741
  SS_Control "aileron": UStart=0.445 UEnd=0.64 Length_C_Start=0.140739 Length_C_End=0.339931 Length_Start=0.7 Length_End=0.7 LE_Flag=0 Surf_Type=2

Wing "H-Stab", child of "Main Wing"
  location (X Y Z) 14.4716 0.7908 0.07908, rotation 0 0 5; relative location 8.06616 0.7908 0, rotation 0 0 5
  symmetric about XZ
  bounding box size 2.25051 7.73736 0.128285
  totals: TotalSpan=6.01008 TotalProjectedSpan=6.01008 TotalChord=1.50252 TotalArea=8.76761 TotalAR=4.11983
  root: chord 1.26528, twist 0, NACA 4-series Camber=0 CamberLoc=0.2 ThickChord=0.03
  sections:
    n  Span     Root_Chord  Tip_Chord  Area      Sweep  Sweep_Location  Dihedral  Twist  Twist_Location  tip airfoil
    1  0.94896  1.26528     1.26528    1.2007    0      0               0         0      0.25            as above
    2  0.07908  1.26528     2.13516    0.134453  -85    0               0         0      0.25            NACA 4-series Camber=0 CamberLoc=0.2 ThickChord=0.06
    3  1.977    2.13516     0.94896    3.04865   25     0               0         0      0.25            as above

Wing "V-Stab", child of "Main Wing"
  location (X Y Z) 11.5457 1.50252 0.15816, rotation 72 0 0; relative location 5.1402 1.50252 0.07908, rotation 72 0 0
  symmetric about XZ
  bounding box size 4.02742 4.68296 2.56146
  totals: TotalSpan=5.29836 TotalProjectedSpan=5.29836 TotalChord=2.01654 TotalArea=10.6844 TotalAR=2.62745
  root: chord 2.60964, twist 0, NACA 4-series Camber=0 CamberLoc=0.2 ThickChord=0.03
  sections:
    n  Span     Root_Chord  Tip_Chord  Area     Sweep  Sweep_Location  Dihedral  Twist  Twist_Location  tip airfoil
    1  2.64918  2.60964     1.42344    5.34218  44.5   0               0         0      0.25            as above
  SS_Control "rudder": UStart=0.35 UEnd=0.67 Length_C_Start=0.274474 Length_C_End=0.491766 Length_Start=0.7 Length_End=0.7 LE_Flag=0 Surf_Type=2

Stack "Fuselage", child of "Su-27"
  location (X Y Z) 0 0 0, rotation 0 0 0
  bounding box size 15.4516 3.33718 1.82714
  cross sections:
    n  XDelta    YDelta  ZDelta    shape
    0  0         0       0         point
    1  0.536479  0       0.011862  general fuselage BotStr=0.83 BotTanAngle=90 CornerRad=0 Height=0.3954 LowStr=0.83 MaxWidthLoc=0 TopStr=0.83 TopTanAngle=90 UpStr=0.83 Width=0.585192
    2  1.73976   0       0.023724  general fuselage BotStr=0.449182 BotTanAngle=90 CornerRad=0 Height=1.20992 LowStr=0.557318 MaxWidthLoc=0 TopStr=0.6405 TopTanAngle=90 UpStr=0.149727 Width=1.31273
    3  1.42344   0       0         general fuselage BotStr=0.998182 BotTanAngle=90 CornerRad=0 Height=1.46298 LowStr=0.423107 MaxWidthLoc=0 TopStr=1.01482 TopTanAngle=90 UpStr=0.495593 Width=1.81884
    4  2.53948   0       0.07908   general fuselage BotStr=1.65714 BotTanAngle=90 CornerRad=0 Height=1.81884 LowStr=1.14141 MaxWidthLoc=0 TopStr=0.445268 TopTanAngle=90 UpStr=0.0679891 Width=2.92596
    5  2.53948   0       0         general fuselage BotStr=1.83 BotTanAngle=90 CornerRad=0 Height=1.73976 LowStr=1.83 MaxWidthLoc=0 TopStr=0.133091 TopTanAngle=90 UpStr=0.540682 Width=3.1632
    6  2.68239   0       0         general fuselage BotStr=0.893652 BotTanAngle=90 CornerRad=0 Height=1.73976 LowStr=1.15275 MaxWidthLoc=0 TopStr=0.50551 TopTanAngle=90 UpStr=0.0694591 Width=2.53056
    7  2.68239   0       0         general fuselage BotStr=0.83 BotTanAngle=90 CornerRad=0 Height=1.1862 LowStr=0.83 MaxWidthLoc=0 TopStr=0.83 TopTanAngle=90 UpStr=0.83 Width=1.20202
    8  0.313312  0       0         circle Circle_Diameter=1.02804
    9  0.994904  0       0         point

Stack "Canopy", child of "Fuselage"
  location (X Y Z) 1.3839 0 0.23724, rotation 0 -5 0
  bounding box size 6.0768 1.54206 1.84832
  cross sections:
    n  XDelta    YDelta  YRotate  ZDelta    shape
    0  0         0       0        0         point
    1  1.05008   0       0        0         general fuselage BotStr=0.83 BotTanAngle=90 CornerRad=0 Height=1.26528 LowStr=0.83 MaxWidthLoc=0 TopStr=0.781909 TopTanAngle=90 UpStr=0.131408 Width=0.94896
    2  1.439     0       0        0.181884  general fuselage BotStr=0.83 BotTanAngle=90 CornerRad=0 Height=1.46298 LowStr=0.83 MaxWidthLoc=-0.5 TopStr=0.815182 TopTanAngle=90 UpStr=0.0118939 Width=1.54206
    3  1.5816    0       5        -0.09885  ellipse Ellipse_Height=0.7908 Ellipse_Width=0.7908
    4  1.439     0       0        -0.01977  ellipse Ellipse_Height=0.55356 Ellipse_Width=0.51402
    5  0.589859  0       0        0.049425  point

Stack "Intakes", child of "Fuselage"
  location (X Y Z) 4.2545 1.47089 0.063264, rotation 0 0 0.5
  symmetric about XZ
  bounding box size 5.57737 3.57712 1.26528
  cross sections:
    n  XDelta    YDelta     ZDelta     shape
    0  0         0          0          general fuselage BotStr=0.83 BotTanAngle=90 CornerRad=0 Height=0 LowStr=0.83 MaxWidthLoc=0 TopStr=0.83 TopTanAngle=90 UpStr=0.83 Width=0
    1  0.47448   -0.205608  -0.11862   general fuselage BotStr=0 BotTanAngle=90 CornerRad=0 Height=0.86988 LowStr=0 MaxWidthLoc=0.15 TopStr=0.0920021 TopTanAngle=90 UpStr=0.113805 Width=0.71172
    2  0.849138  0          -0.055356  general fuselage BotStr=0 BotTanAngle=90 CornerRad=0 Height=1.02804 LowStr=0.0574864 MaxWidthLoc=0.35 TopStr=0 TopTanAngle=90 UpStr=0 Width=0.86988
    3  0.868584  0          0          general fuselage BotStr=0.682435 BotTanAngle=90 CornerRad=0 Height=1.10712 LowStr=0.568182 MaxWidthLoc=0.3 TopStr=0 TopTanAngle=90 UpStr=0 Width=0.94896
    4  1.69828   0          -0.15816   general fuselage BotStr=0.994842 BotTanAngle=90 CornerRad=0 Height=1.10712 LowStr=0.782228 MaxWidthLoc=0.3 TopStr=0 TopTanAngle=90 UpStr=0 Width=0.7908
    5  1.68531   0          0.35586    general fuselage BotStr=0.83 BotTanAngle=90 CornerRad=0 Height=0 LowStr=0.83 MaxWidthLoc=0 TopStr=0.83 TopTanAngle=90 UpStr=0.83 Width=0

Wing "Hstab", child of "Su-27"
  location (X Y Z) 12.6528 0.3954 0.07908, rotation 0 0 5
  symmetric about XZ
  bounding box size 1.9153 3.47122 0.18199
  totals: TotalSpan=2.3724 TotalProjectedSpan=2.3724 TotalChord=1.81884 TotalArea=4.31502 TotalAR=1.30435
  root: chord 1.81884, twist 0, biconvex ThickChord=0.01
  sections:
    n  Span    Root_Chord  Tip_Chord  Area     Sweep  Sweep_Location  Dihedral  Twist  Twist_Location  tip airfoil
    1  1.1862  1.81884     1.81884    2.15751  0      0               0         0      0.25            NACA 4-series Camber=0 CamberLoc=0.2 ThickChord=0.1

VSPAERO settings: Sref=45.9643 bref=11.0712 cref=4.1517 Xcg=8.26759 Ycg=-3.82242e-06 Zcg=0.0431069 AlphaStart=0 AlphaEnd=14 AlphaNpts=3 BetaStart=0 BetaEnd=0 BetaNpts=1 MachStart=0.6 MachEnd=0.95 MachNpts=1 ReCref=1e+07 Vinf=100 Rho=0.002385
  control group "Unnamed Control Group": DeflectionAngle=5
  control group "Unnamed Control Group": DeflectionAngle=0
