OpenVSP model (file version 5), 5 components.
Geometry view with OpenVSP parameter names; values to 6 digits, angles in degrees, lengths in the model's unit.
Overall bounding box: X_Min=-0.0310982 X_Len=41.3431 Y_Min=-17.9467 Y_Len=35.8933 Z_Min=-2.30333 Z_Len=10.7951

Fuselage "Fuselage"
  location (X Y Z) 0 0 0, rotation 0 0 0
  bounding box size 40.0311 3.86868 4.03989
  Design: Length=40
  cross sections:
    n  XLocPercent  YLocPercent  ZLocPercent  shape
    0  0            0            0            point
    1  0.0306537    0            0            ellipse Ellipse_Height=1.75 Ellipse_Width=1.68319
    2  0.134525     0            0.012        ellipse Ellipse_Height=4 Ellipse_Width=3.8
    3  0.5          0            0.012        as above
    4  0.766393     0            0.012        as above
    5  1            0            0.04         point

Wing "Wing", child of "Fuselage"
  location (X Y Z) 13.9344 0 -0.57377, rotation 0 0 0
  symmetric about XZ
  bounding box size 11.9522 35.8933 3.13968
  totals: TotalSpan=37 TotalProjectedSpan=35.8083 TotalChord=3.21667 TotalArea=132.55 TotalAR=9.67357 MAC=4.6497
  root: chord 8, twist 4, NACA 4-series Camber=0.022 CamberLoc=0.2 ThickChord=0.12
  sections:
    n  Span  Root_Chord  Tip_Chord  Area    Sweep  Sweep_Location  Dihedral  Twist  Twist_Location  tip airfoil
    1  5     8           4.5        31.25   33     0               6         3      0.25            as above
    2  12.5  4.5         1          34.375  30     0               6         2      0.25            as above
    3  1     1           0.3        0.65    50     0               60        0      0.25            as above

Custom "Engines", child of "Wing"
  location (X Y Z) 16 4.45652 -1.08696, rotation 0 0 0; relative location 2.06557 4.45652 -0.513186, rotation 0 0 0
  symmetric about XZ
  bounding box size 4 11.5133 2.43275
  Design: Camber=0 CamberLoc=0.2 Chord=4 Height=2 InvertFlag=0 Shape=0 ThickChord=0.1 Width=2.2
  custom script Duct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

Wing "HTail", child of "Fuselage"
  location (X Y Z) 35 0 1.31148, rotation 0 0 0
  symmetric about XZ
  bounding box size 5.28625 12.8735 1.07451
  totals: TotalSpan=13 TotalProjectedSpan=12.8735 TotalChord=1.4 TotalArea=27.55 TotalAR=6.01549 MAC=2.44667
  root: chord 3.5, twist 0, NACA 4-series Camber=0.022 CamberLoc=0.2 ThickChord=0.12
  sections:
    n  Span  Root_Chord  Tip_Chord  Area   Sweep    Sweep_Location  Dihedral  Twist  Twist_Location  tip airfoil
    1  6     3.5         1          13.5   34.4286  0               8         0      0.25            as above
    2  0.5   1           0.1        0.275  65       0               8         0      0.25            as above

Wing "VTail", child of "Fuselage"
  location (X Y Z) 29.5 0 1.4918, rotation 90 0 0
  bounding box size 11.812 1.00058 7
  totals: TotalSpan=7 TotalProjectedSpan=7 TotalChord=3.7 TotalArea=28.8 TotalAR=1.70139 MAC=5.67633
  root: chord 10, twist 0, NACA 4-series Camber=0 CamberLoc=0.2 ThickChord=0.1
  sections:
    n  Span  Root_Chord  Tip_Chord  Area  Sweep  Sweep_Location  Dihedral  Twist  Twist_Location  tip airfoil
    1  2     10          5          15    70     0               0         0      0.25            as above
    2  4.5   5           1          13.5  49     0               0         0      0.25            as above
    3  0.5   1           0.2        0.3   62     0               0         0      0.25            as above
