OpenVSP model (file version 5), 20 components.
Geometry view with OpenVSP parameter names; values to 6 digits, angles in degrees, lengths in the model's unit.
Overall bounding box: X_Min=0 X_Len=37.57 Y_Min=-17.989 Y_Len=35.9781 Z_Min=-1.18491 Z_Len=10.2878

Fuselage "Fuselage"
  location (X Y Z) 0 0 0, rotation 0 0 0
  bounding box size 37.57 3.95 4.14
  Design: Length=37.57
  cross sections:
    n  XLocPercent  YLocPercent  ZLocPercent  shape
    0  0            0            0.013        point
    1  0.0302653    0            0.0119776    circle Circle_Diameter=1.95
    2  0.17301      0            0.03         ellipse Ellipse_Height=4.14 Ellipse_Width=3.95
    3  0.652116     0            0.03         as above
    4  1            0            0.06         point

Fuselage "Fuselage_Fairing", child of "Fuselage"
  location (X Y Z) 13.4844 0 2.90761, rotation 0 0 0
  bounding box size 5.50399 2.7814 1.39169
  Design: Length=5.2
  cross sections:
    n  XLocPercent  YLocPercent  ZLocPercent  shape
    0  0            0            0            point
    1  0.5          0            0            rounded rectangle RoundRectXSec_Radius=0.593529 RoundedRect_Height=1.30909 RoundedRect_Width=2.7814
    2  1            0            0            point

Wing "Wing", child of "Fuselage"
  location (X Y Z) 13.7519 0 3.2655, rotation 0 2.2 0
  symmetric about XZ
  bounding box size 9.93728 35.9781 1.19441
  totals: TotalSpan=36 TotalProjectedSpan=35.9781 TotalChord=2.5 TotalArea=90 TotalAR=14.3825
  root: chord 4, twist 0, NACA 4-series Camber=0 CamberLoc=0.2 ThickChord=0.1
  sections:
    n  Span  Root_Chord  Tip_Chord  Area  Sweep  Sweep_Location  Dihedral  Twist  Twist_Location  tip airfoil
    1  18    4           1          45    24.54  0.25            -2        -1     0.25            as above

Wing "HT", child of "Fuselage"
  location (X Y Z) 31.4 0 1.9, rotation 0 0 0
  symmetric about XZ
  bounding box size 5.10636 12.3618 0.721807
  totals: TotalSpan=12.4 TotalProjectedSpan=12.3618 TotalChord=2.46381 TotalArea=30.5512 TotalAR=5.00188
  root: chord 3.81162, twist 0, NACA 4-series Camber=0 CamberLoc=0.2 ThickChord=0.1
  sections:
    n  Span  Root_Chord  Tip_Chord  Area     Sweep    Sweep_Location  Dihedral  Twist  Twist_Location  tip airfoil
    1  6.2   3.81162     1.116      15.2756  28.1429  0.25            4.5       0      0.25            NACA 4-series Camber=0 CamberLoc=0.2 ThickChord=0.08

Wing "VT", child of "Fuselage"
  location (X Y Z) 28.7644 0 2.70369, rotation 90 0 0
  bounding box size 7.8525 0.630366 6.39918
  totals: TotalSpan=6.39918 TotalProjectedSpan=6.39918 TotalChord=4.325 TotalArea=24.6656 TotalAR=1.66019
  root: chord 6.3, twist 0, NACA 4-series Camber=0 CamberLoc=0.2 ThickChord=0.1
  sections:
    n  Span     Root_Chord  Tip_Chord  Area    Sweep  Sweep_Location  Dihedral  Twist  Twist_Location  tip airfoil
    1  1.79918  6.3         4.5        9.7156  14     0.99            0         0      0.25            NACA 4-series Camber=0 CamberLoc=0.2 ThickChord=0.08
    2  4.6      4.5         2          14.95   14     0.99            0         0      0.25            NACA 4-series Camber=0 CamberLoc=0.2 ThickChord=0.1

Custom "Turbofan", child of "Fuselage"
  location (X Y Z) 14.5 4 1.5, rotation 0 0 0
  bounding box size 3.2 1.88586 1.91156
  Design: Camber=0 CamberLoc=0.2 Chord=3.2 Height=1.7 InvertFlag=0 Shape=0 ThickChord=0.058 Width=1.7
  custom script Duct0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

Wing "Pylon", child of "Turbofan"
  location (X Y Z) 13.1441 4 2.2, rotation 90 0 0; relative location -1.35593 0 0.7, rotation 90 0 0
  bounding box size 5.02529 0.400232 0.75429
  totals: TotalSpan=0.75429 TotalProjectedSpan=0.75429 TotalChord=3 TotalArea=2.26287 TotalAR=0.25143
  root: chord 4, twist 0, NACA 4-series Camber=0 CamberLoc=0.2 ThickChord=0.1
  sections:
    n  Span     Root_Chord  Tip_Chord  Area     Sweep  Sweep_Location  Dihedral  Twist  Twist_Location  tip airfoil
    1  0.75429  4           2          2.26287  76     0               0         0      0.25            as above

Fuselage "Spinners", child of "Turbofan"
  location (X Y Z) 13.6304 4 1.5, rotation 0 0 0; relative location -0.869565 0 0, rotation 0 0 0
  symmetric about XZ
  bounding box size 0.3 0.35 0.35
  Design: Length=0.3
  cross sections:
    n  XLocPercent  YLocPercent  ZLocPercent  shape
    0  0            0            0            point
    1  0.51087      0            0            circle Circle_Diameter=0.35
    2  1            0            0            as above
    3  1            0            0            point

Wing "Fan_blade", child of "Turbofan"
  location (X Y Z) 13.81 4 1.6, rotation 90 -20 0; relative location -0.69 0 0.1, rotation 90 -20 0
  15 copies around X
  bounding box size 0.150419 1.47942 1.47885
  totals: TotalSpan=1.24 TotalProjectedSpan=1.24 TotalChord=0.2 TotalArea=0.248 TotalAR=6.2
  root: chord 0.1, twist 0, NACA 4-series Camber=0 CamberLoc=0.2 ThickChord=0.1
  sections:
    n  Span  Root_Chord  Tip_Chord  Area   Sweep     Sweep_Location  Dihedral  Twist  Twist_Location  tip airfoil
    1  0.62  0.1         0.3        0.124  -8.16667  0               0         -40    0.25            NACA 4-series Camber=0 CamberLoc=0.2 ThickChord=0.0416667

Fuselage "Nozzle", child of "Turbofan"
  location (X Y Z) 13.9565 4 1.5, rotation 0 0 0; relative location -0.543478 0 0, rotation 0 0 0
  bounding box size 2.85 1.2 1.2
  Design: Length=2.85
  cross sections:
    n  XLocPercent  YLocPercent  ZLocPercent  shape
    0  0            0            0            circle Circle_Diameter=1
    1  0.538043     0            0            circle Circle_Diameter=1.2
    2  1            0            0            point

Ellipsoid "CG", child of "Fuselage"
  location (X Y Z) 14.77 0 0.96, rotation 0 0 0
  bounding box size 0.4 0.4 0.4
  Design: A_Radius=0.2 B_Radius=0.2 C_Radius=0.2

Ellipsoid "NP", child of "Fuselage"
  location (X Y Z) 15.11 0 0.96, rotation 0 0 0
  bounding box size 0.4 0.4 0.4
  Design: A_Radius=0.2 B_Radius=0.2 C_Radius=0.2

Ellipsoid "CG_comp", child of "Fuselage"
  location (X Y Z) 14.26 0 0.96, rotation 0 0 0
  bounding box size 0.4 0.4 0.4
  Design: A_Radius=0.2 B_Radius=0.2 C_Radius=0.2

Custom "Turbofan", child of "Fuselage"
  location (X Y Z) 14.5 -4 1.5, rotation 0 0 0
  bounding box size 3.2 1.88692 1.91264
  Design: Camber=0 CamberLoc=0.2 Chord=3.2 Height=1.7 InvertFlag=0 Shape=0 ThickChord=0.0583333 Width=1.7
  custom script Duct0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

Wing "Pylon", child of "Turbofan"
  location (X Y Z) 13.1441 -4 2.2, rotation 90 0 0; relative location -1.35593 0 0.7, rotation 90 0 0
  bounding box size 5.02529 0.400232 0.75429
  totals: TotalSpan=0.75429 TotalProjectedSpan=0.75429 TotalChord=3 TotalArea=2.26287 TotalAR=0.25143
  root: chord 4, twist 0, NACA 4-series Camber=0 CamberLoc=0.2 ThickChord=0.1
  sections:
    n  Span     Root_Chord  Tip_Chord  Area     Sweep  Sweep_Location  Dihedral  Twist  Twist_Location  tip airfoil
    1  0.75429  4           2          2.26287  76     0               0         0      0.25            as above

Fuselage "Spinners", child of "Turbofan"
  location (X Y Z) 13.6304 -4 1.5, rotation 0 0 0; relative location -0.869565 0 0, rotation 0 0 0
  symmetric about XZ
  bounding box size 0.3 0.35 0.35
  Design: Length=0.3
  cross sections:
    n  XLocPercent  YLocPercent  ZLocPercent  shape
    0  0            0            0            point
    1  0.51087      0            0            circle Circle_Diameter=0.35
    2  1            0            0            as above
    3  1            0            0            point

Wing "Fan_blade", child of "Turbofan"
  location (X Y Z) 13.81 -4 1.6, rotation 90 -20 0; relative location -0.69 0 0.1, rotation 90 -20 0
  15 copies around X
  bounding box size 0.150419 1.47942 1.47885
  totals: TotalSpan=1.24 TotalProjectedSpan=1.24 TotalChord=0.2 TotalArea=0.248 TotalAR=6.2
  root: chord 0.1, twist 0, NACA 4-series Camber=0 CamberLoc=0.2 ThickChord=0.1
  sections:
    n  Span  Root_Chord  Tip_Chord  Area   Sweep     Sweep_Location  Dihedral  Twist  Twist_Location  tip airfoil
    1  0.62  0.1         0.3        0.124  -8.16667  0               0         -40    0.25            NACA 4-series Camber=0 CamberLoc=0.2 ThickChord=0.0416667

Fuselage "Nozzle", child of "Turbofan"
  location (X Y Z) 13.9565 -4 1.5, rotation 0 0 0; relative location -0.543478 0 0, rotation 0 0 0
  bounding box size 2.85 1.2 1.2
  Design: Length=2.85
  cross sections:
    n  XLocPercent  YLocPercent  ZLocPercent  shape
    0  0            0            0            circle Circle_Diameter=1
    1  0.538043     0            0            circle Circle_Diameter=1.2
    2  1            0            0            point

Wing "Truss"
  location (X Y Z) 13.7519 0 -1, rotation 0 2.2 0
  symmetric about XZ
  bounding box size 6.64633 22.7464 3.74604
  totals: TotalSpan=24 TotalProjectedSpan=22.7464 TotalChord=1.25 TotalArea=30 TotalAR=17.2467
  root: chord 1.7, twist 0, NACA 4-series Camber=0 CamberLoc=0.2 ThickChord=0.1
  sections:
    n  Span  Root_Chord  Tip_Chord  Area  Sweep  Sweep_Location  Dihedral  Twist  Twist_Location  tip airfoil
    1  12    1.7         0.8        15    24.54  0.25            18.6      -1     0.25            as above

Fuselage "Truss_Fairing", child of "Truss"
  location (X Y Z) 12.625 0 -0.529891, rotation 0 0 0
  bounding box size 7.35163 2.7814 1.63754
  Design: Length=7.35163
  cross sections:
    n  XLocPercent  YLocPercent  ZLocPercent  shape
    0  0            0            0            point
    1  0.5          0            0            rounded rectangle RoundRectXSec_Radius=0.593529 RoundedRect_Height=1.30909 RoundedRect_Width=2.7814
    2  1            0            0            point
