OpenVSP model (file version 5), 19 components.
Geometry view with OpenVSP parameter names; values to 6 digits, angles in degrees, lengths in the model's unit.
Overall bounding box: X_Min=-0.0345061 X_Len=7.03451 Y_Min=-7.9 Y_Len=15.8018 Z_Min=-1.47833 Z_Len=4.37833

Fuselage "Fuselage"
  location (X Y Z) 0 0 0, rotation 0 0 0
  bounding box size 7.03451 2.00001 2
  Design: Length=7
  cross sections:
    n  XLocPercent  YLocPercent  ZLocPercent  shape
    0  0            0            -0.0597336   point
    1  0.360656     0            0.012        super ellipse Super_Height=2 Super_M=3 Super_MaxWidthLoc=0 Super_N=3 Super_Width=2
    2  1            0            0.108351     point

Wing "Wing", child of "Fuselage"
  location (X Y Z) 2.04918 0 0.901639, rotation 0 0 0
  symmetric about XZ
  bounding box size 1.49723 13.9734 0.480613
  totals: TotalSpan=14 TotalProjectedSpan=13.9734 TotalChord=1.25 TotalArea=17.5 TotalAR=11.1574 MAC=1.26654
  root: chord 1.5, twist 4, NACA 4-series Camber=0.02 CamberLoc=0.4 ThickChord=0.12
  sections:
    n  Span  Root_Chord  Tip_Chord  Area    Sweep  Sweep_Location  Dihedral  Twist  Twist_Location  tip airfoil
    1  3.5   1.5         1.25       4.8125  0      0               5         1.5    0.25            as above
    2  3.5   1.25        1          3.9375  0      0               0         1.5    0.25            as above

Stack "Engine-3", child of "Wing"
  location (X Y Z) 2.25 3.5 1.22, rotation 0 0 0
  bounding box size 0.75 0.3 0.3
  cross sections:
    n  XDelta  YDelta  ZDelta  shape
    0  0       0       0       circle Circle_Diameter=0.12
    1  -0.6    0       0       circle Circle_Diameter=0.3
    2  -0.15   0       0       circle Circle_Diameter=0.01

Propeller "PropGeom", child of "Engine-3"
  location (X Y Z) 1.65 3.5 1.22, rotation 0 0 0; relative location -0.6 0 0, rotation 0 0 0
  bounding box size 0.100734 2.0018 2
  Design: Diameter=2 NumBlade=5 Beta34=20 UseBeta34Flag=1 Feather=0 Rotate=0 Precone=0 ReverseFlag=0 FoldAngle=0 PropMode=1 AF=149.24 CLi=0.524046 Chord=0.174903 Solidity=0.278366 ConstructXoC=0.5 FeatherAxisXoC=0.5 FeatherOffsetXoC=0
  cross sections:
    n  RadiusFrac  shape
    0  0.05        ellipse Ellipse_Height=0.0407407 Ellipse_Width=0.0814815
    1  0.400001    NACA 16-series Chord=0.182053 IdealCl=0.7 ThickChord=0.200021
    2  1           NACA 16-series Chord=0.13 IdealCl=0.2 ThickChord=0.03
  Chord along r/R (cubic Bezier): 0.05: 0.0814815, 0.233333: 0.151481, 0.416667: 0.2, 0.6: 0.2, 0.716667: 0.2, 0.833333: 0.2, 0.95: 0.2, 0.966667: 0.2, 0.983333: 0.2, 1: 0.13
  Twist along r/R (PCHIP): 0.05: 46.75, 0.75: 20, 1: 13
  Thick along r/R (cubic Bezier): 0.05: 0.5, 0.1667: 0.3, 0.2834: 0.225, 0.4001: 0.2, 0.466733: 0.125, 0.533367: 0.115, 0.6: 0.1, 0.733333: 0.075, 0.866667: 0.055, 1: 0.03
  CLI along r/R (cubic Bezier): 0.05: 0, 0.1667: 0.7, 0.2834: 0.7, 0.4001: 0.7, 0.466733: 0.7, 0.533367: 0.7, 0.6: 0.7, 0.733333: 0.7, 0.866667: 0.7, 1: 0.2

Stack "Engine-2", child of "Wing"
  location (X Y Z) 2.25 -3.5 1.22, rotation 0 0 0
  bounding box size 0.75 0.3 0.3
  cross sections:
    n  XDelta  YDelta  ZDelta  shape
    0  0       0       0       circle Circle_Diameter=0.12
    1  -0.6    0       0       circle Circle_Diameter=0.3
    2  -0.15   0       0       circle Circle_Diameter=0.01

Propeller "PropGeom", child of "Engine-2"
  location (X Y Z) 1.65 -3.5 1.22, rotation 0 0 0; relative location -0.6 0 0, rotation 0 0 0
  bounding box size 0.100734 2.0018 2
  Design: Diameter=2 NumBlade=5 Beta34=20 UseBeta34Flag=1 Feather=0 Rotate=0 Precone=0 ReverseFlag=0 FoldAngle=0 PropMode=1 AF=149.24 CLi=0.524046 Chord=0.174903 Solidity=0.278366 ConstructXoC=0.5 FeatherAxisXoC=0.5 FeatherOffsetXoC=0
  cross sections:
    n  RadiusFrac  shape
    0  0.05        ellipse Ellipse_Height=0.0407407 Ellipse_Width=0.0814815
    1  0.400001    NACA 16-series Chord=0.182053 IdealCl=0.7 ThickChord=0.200021
    2  1           NACA 16-series Chord=0.13 IdealCl=0.2 ThickChord=0.03
  blade curves as in "PropGeom"

Stack "Engine-4", child of "Wing"
  location (X Y Z) 2.25 6.9 1.22, rotation 0 0 0
  bounding box size 0.75 0.3 0.3
  cross sections:
    n  XDelta  YDelta  ZDelta  shape
    0  0       0       0       circle Circle_Diameter=0.12
    1  -0.6    0       0       circle Circle_Diameter=0.3
    2  -0.15   0       0       circle Circle_Diameter=0.01

Propeller "PropGeom", child of "Engine-4"
  location (X Y Z) 1.65 6.9 1.22, rotation 0 0 0; relative location -0.6 0 0, rotation 0 0 0
  bounding box size 0.100734 2.0018 2
  Design: Diameter=2 NumBlade=5 Beta34=20 UseBeta34Flag=1 Feather=0 Rotate=0 Precone=0 ReverseFlag=0 FoldAngle=0 PropMode=1 AF=149.24 CLi=0.524046 Chord=0.174903 Solidity=0.278366 ConstructXoC=0.5 FeatherAxisXoC=0.5 FeatherOffsetXoC=0
  cross sections:
    n  RadiusFrac  shape
    0  0.05        ellipse Ellipse_Height=0.0407407 Ellipse_Width=0.0814815
    1  0.400001    NACA 16-series Chord=0.182053 IdealCl=0.7 ThickChord=0.200021
    2  1           NACA 16-series Chord=0.13 IdealCl=0.2 ThickChord=0.03
  blade curves as in "PropGeom"

Stack "Engine-1", child of "Wing"
  location (X Y Z) 2.25 -6.9 1.22, rotation 0 0 0
  bounding box size 0.75 0.3 0.3
  cross sections:
    n  XDelta  YDelta  ZDelta  shape
    0  0       0       0       circle Circle_Diameter=0.12
    1  -0.6    0       0       circle Circle_Diameter=0.3
    2  -0.15   0       0       circle Circle_Diameter=0.01

Propeller "PropGeom", child of "Engine-1"
  location (X Y Z) 1.65 -6.9 1.22, rotation 0 0 0; relative location -0.6 0 0, rotation 0 0 0
  bounding box size 0.100734 2.0018 2
  Design: Diameter=2 NumBlade=5 Beta34=20 UseBeta34Flag=1 Feather=0 Rotate=0 Precone=0 ReverseFlag=0 FoldAngle=0 PropMode=1 AF=149.24 CLi=0.524046 Chord=0.174903 Solidity=0.278366 ConstructXoC=0.5 FeatherAxisXoC=0.5 FeatherOffsetXoC=0
  cross sections:
    n  RadiusFrac  shape
    0  0.05        ellipse Ellipse_Height=0.0407407 Ellipse_Width=0.0814815
    1  0.400001    NACA 16-series Chord=0.182053 IdealCl=0.7 ThickChord=0.200021
    2  1           NACA 16-series Chord=0.13 IdealCl=0.2 ThickChord=0.03
  blade curves as in "PropGeom"

Wing "VTail", child of "Fuselage"
  location (X Y Z) 5.7377 0 0.655738, rotation 0 0 0
  symmetric about XZ
  bounding box size 1 4.33013 1.35505
  totals: TotalSpan=5 TotalProjectedSpan=4.33013 TotalChord=0.875 TotalArea=4.375 TotalAR=4.28571 MAC=0.880952
  root: chord 1, twist 0, NACA 4-series Camber=0 CamberLoc=0.2 ThickChord=0.12
  sections:
    n  Span  Root_Chord  Tip_Chord  Area    Sweep  Sweep_Location  Dihedral  Twist  Twist_Location  tip airfoil
    1  2.5   1           0.75       2.1875  0      0               30        0      0.25            as above

Stack "Engine-5", child of "VTail"
  location (X Y Z) 6 -2.175 1.9, rotation 0 0 0
  bounding box size 0.81 0.3 0.3
  cross sections:
    n  XDelta  YDelta  ZDelta  shape
    0  0       0       0       circle Circle_Diameter=0.01
    1  -0.06   0       0       circle Circle_Diameter=0.12
    2  -0.6    0       0       circle Circle_Diameter=0.3
    3  -0.15   0       0       circle Circle_Diameter=0.01

Propeller "PropGeom", child of "Engine-5"
  location (X Y Z) 5.4 -2.175 1.9, rotation 0 0 0; relative location -0.6 0 0, rotation 0 0 0
  bounding box size 0.100734 2.0018 2
  Design: Diameter=2 NumBlade=5 Beta34=20 UseBeta34Flag=1 Feather=0 Rotate=0 Precone=0 ReverseFlag=0 FoldAngle=0 PropMode=1 AF=149.24 CLi=0.524046 Chord=0.174903 Solidity=0.278366 ConstructXoC=0.5 FeatherAxisXoC=0.5 FeatherOffsetXoC=0
  cross sections:
    n  RadiusFrac  shape
    0  0.05        ellipse Ellipse_Height=0.0407407 Ellipse_Width=0.0814815
    1  0.400001    NACA 16-series Chord=0.182053 IdealCl=0.7 ThickChord=0.200021
    2  1           NACA 16-series Chord=0.13 IdealCl=0.2 ThickChord=0.03
  blade curves as in "PropGeom"

Stack "Engine-6", child of "VTail"
  location (X Y Z) 6 2.175 1.9, rotation 0 0 0
  bounding box size 0.81 0.3 0.3
  cross sections:
    n  XDelta  YDelta  ZDelta  shape
    0  0       0       0       circle Circle_Diameter=0.01
    1  -0.06   0       0       circle Circle_Diameter=0.12
    2  -0.6    0       0       circle Circle_Diameter=0.3
    3  -0.15   0       0       circle Circle_Diameter=0.01

Propeller "PropGeom", child of "Engine-6"
  location (X Y Z) 5.4 2.175 1.9, rotation 0 0 0; relative location -0.6 0 0, rotation 0 0 0
  bounding box size 0.100734 2.0018 2
  Design: Diameter=2 NumBlade=5 Beta34=20 UseBeta34Flag=1 Feather=0 Rotate=0 Precone=0 ReverseFlag=0 FoldAngle=0 PropMode=1 AF=149.24 CLi=0.524046 Chord=0.174903 Solidity=0.278366 ConstructXoC=0.5 FeatherAxisXoC=0.5 FeatherOffsetXoC=0
  cross sections:
    n  RadiusFrac  shape
    0  0.05        ellipse Ellipse_Height=0.0407407 Ellipse_Width=0.0814815
    1  0.400001    NACA 16-series Chord=0.182053 IdealCl=0.7 ThickChord=0.200021
    2  1           NACA 16-series Chord=0.13 IdealCl=0.2 ThickChord=0.03
  blade curves as in "PropGeom"

Wing "MainGear", child of "Fuselage"
  location (X Y Z) 2.54098 0 -0.327869, rotation 0 0 0
  symmetric about XZ
  bounding box size 0.551924 2.12132 1.1807
  totals: TotalSpan=3 TotalProjectedSpan=2.12132 TotalChord=0.15 TotalArea=0.45 TotalAR=10 MAC=0.15
  root: chord 0.15, twist 0, NACA 4-series Camber=0 CamberLoc=0.2 ThickChord=0.8
  sections:
    n  Span  Root_Chord  Tip_Chord  Area   Sweep  Sweep_Location  Dihedral  Twist  Twist_Location  tip airfoil
    1  1.5   0.15        0.15       0.225  15     0               -45       0      0.25            as above

Pod "PodGeom", child of "MainGear"
  location (X Y Z) 2.8 1.05 -1.395, rotation 0 0 0
  symmetric about XZ
  bounding box size 0.5 2.26667 0.166667
  Design: FineRatio=6 Length=0.5

Wing "FrontGear", child of "Fuselage"
  location (X Y Z) 0.655738 0 -0.327869, rotation -90 0 0
  bounding box size 0.34396 0.120038 1.1
  totals: TotalSpan=1.1 TotalProjectedSpan=1.1 TotalChord=0.15 TotalArea=0.165 TotalAR=7.33333 MAC=0.15
  root: chord 0.15, twist 0, NACA 4-series Camber=0 CamberLoc=0.2 ThickChord=0.8
  sections:
    n  Span  Root_Chord  Tip_Chord  Area   Sweep  Sweep_Location  Dihedral  Twist  Twist_Location  tip airfoil
    1  1.1   0.15        0.15       0.165  -10    0               0         0      0.25            as above

Pod "PodGeom", child of "FrontGear"
  location (X Y Z) 0.3 0 -1.395, rotation 0 0 0
  bounding box size 0.5 0.166667 0.166667
  Design: FineRatio=6 Length=0.5
