OpenVSP model (file version 5), 9 components.
Geometry view with OpenVSP parameter names; values to 6 digits, angles in degrees, lengths in the model's unit.
Overall bounding box: X_Min=0 X_Len=212.978 Y_Min=-99.358 Y_Len=198.716 Z_Min=-13.615 Z_Len=60.0835

Fuselage "FuselageGeom"
  location (X Y Z) 0 0 0, rotation 0 0 0
  bounding box size 209.1 21.532 21.738
  Design: Length=209.1
  cross sections:
    n  XLocPercent  YLocPercent  ZLocPercent  shape
    0  0            0            0.0142607    general fuselage BotStr=0.83 BotTanAngle=90 CornerRad=0 Height=0.0813008 LowStr=0.83 MaxWidthLoc=0 TopStr=0.83 TopTanAngle=90 UpStr=0.83 Width=0
    1  0.169959     0            0.0204082    general fuselage BotStr=0.83 BotTanAngle=90 CornerRad=0 Height=21.3374 LowStr=0.83 MaxWidthLoc=0 TopStr=0.83 TopTanAngle=90 UpStr=0.83 Width=20.9309
    2  0.484186     0            0.0204082    as above
    3  0.708287     0            0.022324     general fuselage BotStr=0.83 BotTanAngle=90 CornerRad=0.501779 Height=21.3374 LowStr=0.83 MaxWidthLoc=0 TopStr=0.83 TopTanAngle=90 UpStr=0.83 Width=21.0504
    4  1            0            0.0470664    rounded rectangle RoundRectXSec_Radius=0.254093 RoundRect_Keystone=0.501779 RoundRect_Skew=-0.0355872 RoundedRect_Height=4.10569 RoundedRect_Width=1.54472

Wing "WingGeom", child of "FuselageGeom"
  location (X Y Z) 62.2029 0 -2.45902, rotation 0 0.491803 0
  symmetric about XZ
  bounding box size 78.154 198.716 13.1146
  totals: TotalSpan=199.619 TotalProjectedSpan=198.716 TotalChord=27.8809 TotalArea=5641.51 TotalAR=6.99954 MAC=36.6924
  root: chord 59.8125, twist 4, NACA 4-series Camber=0 CamberLoc=0.2 ThickChord=0.1
  sections:
    n  Span     Root_Chord  Tip_Chord  Area     Sweep    Sweep_Location  Dihedral  Twist  Twist_Location  tip airfoil
    1  51.3649  59.8125     21.9599    2100.12  32.7143  0.182143        6.35714   0      0.214286        as above
    2  48.4444  21.9599     7.79132    720.64   32.1429  0               4.28571   0      0.25            as above
  SS_Control "SS_CONT_0": UStart=0.45098 UEnd=0.617647 Length_C_Start=0.191176 Length_C_End=0.191176 Length_Start=5.61386 Length_End=2.92354 LE_Flag=0 Surf_Type=2
  SS_Control "SS_CONT_1": UStart=0.294118 UEnd=0.421569 Length_C_Start=0.0942408 Length_C_End=0.148054 Length_Start=5.00644 Length_End=5.00644 LE_Flag=0 Surf_Type=2
  SS_Control "SS_CONT_2": UStart=0.627451 UEnd=0.740196 Length_C_Start=0.20098 Length_C_End=0.20098 Length_Start=2.96179 Length_End=1.67757 LE_Flag=0 Surf_Type=2

Wing "Vertical Stabilizer", child of "FuselageGeom"
  location (X Y Z) 166.814 0 15.082, rotation 90.082 0 -3.60656
  bounding box size 37.4281 2.67328 33.0671
  totals: TotalSpan=33.25 TotalProjectedSpan=33.25 TotalChord=16.773 TotalArea=557.704 TotalAR=1.98235 MAC=18.7383
  root: chord 26.7173, twist 0, NACA 4-series Camber=0 CamberLoc=0.2 ThickChord=0.1
  sections:
    n  Span   Root_Chord  Tip_Chord  Area     Sweep    Sweep_Location  Dihedral  Twist  Twist_Location  tip airfoil
    1  33.25  26.7173     6.82875    557.704  40.6786  0               0         0      0.25            as above
  SS_Control "SS_CONT_0": UStart=0.328431 UEnd=0.647059 Length_C_Start=0.25 Length_C_End=0.25 Length_Start=6.67934 Length_End=1.99967 LE_Flag=0 Surf_Type=2

Wing "Horizontal Stabilzer"
  location (X Y Z) 175.113 0 8.77049, rotation 0 -3.44262 -0.163934
  symmetric about XZ
  bounding box size 37.8662 71.7014 5.07496
  totals: TotalSpan=71.9469 TotalProjectedSpan=71.8744 TotalChord=16.4348 TotalArea=1182.43 TotalAR=4.36891 MAC=17.9571
  root: chord 25.1037, twist 0, NACA 4-series Camber=0 CamberLoc=0.2 ThickChord=0.1
  sections:
    n  Span     Root_Chord  Tip_Chord  Area     Sweep  Sweep_Location  Dihedral  Twist     Twist_Location  tip airfoil
    1  35.9734  25.1037     7.76587    591.215  40     0               2.57143   -2.71429  0.25            as above
  SS_Control "SS_CONT_0": UStart=0.357843 UEnd=0.651961 Length_C_Start=0.22549 Length_C_End=0.22549 Length_Start=5.37303 Length_End=1.92336 LE_Flag=0 Surf_Type=2

Custom "Duct"
  location (X Y Z) 77.6519 -32.7989 -5.94203, rotation 0 0 0
  symmetric about XZ
  bounding box size 13.867 81.1769 15.346
  Design: Camber=0.136364 CamberLoc=0.113636 Chord=13.867 Height=13.5946 InvertFlag=0 Shape=0 ThickChord=0.111364 Width=14.034
  custom script Duct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

Custom "Duct", child of "Duct"
  location (X Y Z) 87.5885 -32.7989 -5.94203, rotation 0 0 0
  symmetric about XZ
  bounding box size 11.9407 79.7313 13.4286
  Design: Camber=0.0136364 CamberLoc=0 Chord=11.9277 Height=11.4959 InvertFlag=0 Shape=0 ThickChord=0.172727 Width=12.3809
  custom script Duct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

Custom "Cone"
  location (X Y Z) 93.4615 -32.7717 -5.83333, rotation 0 0 0
  symmetric about XZ
  bounding box size 6.87324 72.2532 6.70972
  Design: Diameter=6.70972 Height=6.87324
  custom script Cone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

Custom "Box"
  location (X Y Z) 77.5883 33.2609 1.41304, rotation 0 4.13043 0
  symmetric about XZ
  bounding box size 14.291 68.1442 2.10554
  Design: Height=1.08196 Length=14.25 SquareFlag=0 Width=1.62243
  custom script Box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

Mesh "MeshGeom"
  location (X Y Z) 0 0 0, rotation 0 0 0
  triangle mesh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

VSPAERO settings (reference component "WingGeom"): Sref=5641.51 bref=199.619 cref=27.8809 Xcg=0.05 Ycg=0 Zcg=0 AlphaStart=0 AlphaEnd=10 AlphaNpts=3 BetaStart=0 BetaEnd=0 BetaNpts=1 MachStart=0 MachEnd=0 MachNpts=1 ReCref=1e+07 Vinf=100 Rho=0.002377
  control group "Unnamed Control Group": DeflectionAngle=0
